*Heading
** Job name: Job-1 Model name: Model-1
** Generated by: Abaqus/CAE 6.14-1
*Preprint, echo=NO, model=NO, history=NO, contact=NO
**
** PARTS
**
*Part, name=Part-3-Copy
*Node
      1,  0.150000006, 0.0845320001
      2,  0.150000006,  0.129999995
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*************************************************
*User element, nodes=8, type=U1, properties=12, coordinates=2, var=100
1,2
1,3
1,11
*************************************************
*ELEMENT, TYPE=U1, ELSET=SOLID
   1,    13,    14,   809,  1771,  7033,  7034,  7035,  7036
   2,   181,  1771,   668,   180,  7037,  7038,  7039,  7040
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*************************************************
*UEL PROPERTY, ELSET=SOLID
190000, 0.3, 520, 0.067, 8.5e-4, 1.e-3, 5.1e-5, 35.3,
53.5, 0.0005, 3.e-3, 10.
**E, nu, Sy, N, D, L_0, alphi, w,
**A, xk, e_f, t0
*************************************************
*Element, type=CPE8R, elset=Visualization
10001,13,14,809,1771,7033,7034,7035,7036
10002,181,1771,668,180,7037,7038,7039,7040
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
*Nset, nset=Set-1, generate
     1,  21018,      1
*Elset, elset=Set-1, generate
    1,  6955,     1
** Section: Section-1
*Solid Section, elset=Visualization, material=Material-1
,
*End Part
**
**
** ASSEMBLY
**
*Assembly, name=Assembly
**
*Instance, name=Part-3-Copy-1, part=Part-3-Copy
*End Instance
**
*Nset, nset=all, instance=Part-3-Copy-1, generate
     1,  21018,      1
*Elset, elset=all, instance=Part-3-Copy-1, generate
    1,  6955,     1
*Nset, nset=interface, instance=Part-3-Copy-1
     2,     3,    12,    57,    58,    59
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*Elset, elset=interface, instance=Part-3-Copy-1
  284,  286,  287,  288,  289,  295
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*Nset, nset=left, instance=Part-3-Copy-1
     8,     9,   286,   287,   288,   289
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*Elset, elset=left, instance=Part-3-Copy-1
 1852, 1853, 1854, 1878, 1880, 1881, 1886, 1887, 1890, 1893
*Nset, nset=right, instance=Part-3-Copy-1
    10,    11,   314,   315,   316,   317
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*Elset, elset=right, instance=Part-3-Copy-1
 1805, 1806, 1816, 1823, 1824, 1904, 1908, 1912, 1913, 2101
*End Assembly
**
*Amplitude, name=Amp-1
             0.,              1.,       10000000.,              1.
**
*Amplitude, name=Amp-2
             0.,              1.,           0.005,              0.,      100000000.,              0.
*Material, name=Material-1
*Density
1.,
*Depvar
     25,
1, S11, S11
2, S22, S22
3, S33, S33
4, S12, S12
5, E11, E11
6, E22, E22
7, E33, E33
8, E12, E12
9, EE11, EE11
10, EE22, EE22
11, EE33, EE33
12, EE12, EE12
13, EP11, EP11
14, EP22, EP22
15, EP33, EP33
16, EP12, EP12
17, PEEQ, PEEQ
18, PHI, PHI
19, LS, LS
20,  Sh,  Sh
21,  DEQ,  DEQ
22,  cL,  cL
23,  Ti,  Ti
24,  pi,  pi
25, PitD, PitD
*Specific Heat
1.,
*User Material, constants=0
** ----------------------------------------------------------------
** STEP: Step-1
**
*Step, name=Step-1, nlgeom=NO,inc=1.
*Coupled Temperature-displacement, creep=none
1., 1.,
**
** BOUNDARY CONDITIONS
** Name: BC-3 Type: Temperature
*Boundary, amplitude=Amp-1
all, 11, 11, 1.
** Name: BC-4 Type: Temperature
*Boundary, amplitude=Amp-1
all, 3, 3, 1.
**
** CONTROLS
**
*Controls, reset
*Controls, analysis=discontinuous
**
** OUTPUT REQUESTS
**
*Restart, write, frequency=0
**
** FIELD OUTPUT: F-Output-1
**
*Output, field, frequency=1
*Node Output
CF, RF, U
*Element Output, directions=YES
SDV,
**
** HISTORY OUTPUT: H-Output-2
**
*Output, history, frequency=1
*Node Output, nset=left
RF1,
**
** HISTORY OUTPUT: H-Output-1
**
*Node Output, nset=right
U1,
*End Step
**
** STEP: Step-2
**
*Step, name=Step-2, nlgeom=NO,inc=1.
*Coupled Temperature-displacement, creep=none
1., 1.,
**
** BOUNDARY CONDITIONS
** Name: BC-3 Type: Temperature
*Boundary,op=NEW
**
** Name: BC-4 Type: Temperature
*Boundary,op=NEW
**
** CONTROLS
**
*Controls, reset
*Controls, analysis=discontinuous
**
** OUTPUT REQUESTS
**
*Restart, write, frequency=0
**
** FIELD OUTPUT: F-Output-1
**
*Output, field, frequency=1
*Node Output
CF, RF, U
*Element Output, directions=YES
SDV,
**
** HISTORY OUTPUT: H-Output-2
**
*Output, history, frequency=1
*Node Output, nset=left
RF1,
**
** HISTORY OUTPUT: H-Output-1
**
*Node Output, nset=right
U1,
*End Step
**
** STEP: Step-3
**
*Step, name=Step-3, nlgeom=NO, inc=100000000
*Coupled Temperature-displacement, creep=none, deltmx=1.
1e-3., 1., 1e-10, 1.
**
** BOUNDARY CONDITIONS
** Name: BC-5 Type: Displacement/Rotation
*Boundary, amplitude=Amp-1
right, 1, 1, 0.0002
**
** Name: BC-6 Type: Displacement/Rotation
*Boundary, amplitude=Amp-1
left, 1, 1, -0.0002
**
** CONTROLS
**
*Controls, reset
*Controls, analysis=discontinuous
**
** OUTPUT REQUESTS
**
*Restart, write, frequency=0
**
** FIELD OUTPUT: F-Output-1
**
*Output, field, frequency=1
*Node Output
CF, RF, U
*Element Output, directions=YES
SDV,
**
** HISTORY OUTPUT: H-Output-2
**
*Output, history, frequency=1
*Node Output, nset=left
RF1,
**
** HISTORY OUTPUT: H-Output-1
**
*Node Output, nset=right
U1,
*End Step
**
** STEP: Step-4
**
*Step, name=Step-4, nlgeom=NO, inc=100000000
*Coupled Temperature-displacement, creep=none, deltmx=1.
1e-3., 900., 1e-10, 0.25
**
** BOUNDARY CONDITIONS
**
** Name: BC-7 Type: Temperature
*Boundary, amplitude=Amp-2
interface, 11, 11, 1.
**
** Name: BC-8 Type: Temperature
*Boundary, amplitude=Amp-2
interface, 3, 3, 1.
**
** CONTROLS
**
*Controls, reset
*Controls, parameters=field, field=global
0.1, 0.1, , , 0.5, , ,
**
** OUTPUT REQUESTS
**
*Restart, write, frequency=0
**
** FIELD OUTPUT: F-Output-1
**
*Output, field, frequency=5
*Node Output
CF, RF, U
*Element Output, directions=YES
SDV,
**
** HISTORY OUTPUT: H-Output-1
**
*Output, history, frequency=2
*Node Output, nset=left
RF1,
**
** HISTORY OUTPUT: H-Output-1
**
*Node Output, nset=right
U1,
*End Step
